*Heading
** Job name: TPB Model name: Model-1
** Generated by: Abaqus/CAE 6.14-1
*Preprint, echo=NO, model=NO, history=NO, contact=NO
**
** PARTS
**
*Part, name=ThreePB
*Node
      1, -0.409999996,           0.
      2, -0.409999996,           2.
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***************************************************************
*User element, nodes=4, type=U2, properties=5, coordinates=2, VARIABLES=12
1,2
*********************** RECTENGULAR ****************************
*User element, nodes=4, type=U6, properties=4, coordinates=2, VARIABLES=8
4
***************************************************************
***************************************************************
*Element, type=U2
1, 2031, 2071, 2069, 2043
2, 35, 2029, 2060, 34
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***************************************************************
*Element, type=U6
30216, 2031, 2071, 2069, 2043
30217, 35, 2029, 2060, 34
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***************************************************************
********************** ASSIGNING MATERIAL PROP ****************
*Elset, elset=uel_model, generate
     1,  30215,      1
***************************************************************
*Uel property, elset=uel_model
20800, 0.3, 0, 0.03, 0.5
**E, nu, at, lc, gc
***************************************************************
*Elset, elset=uel_model_PH, generate
30216, 60430, 1
***************************************************************
*Uel property, elset=uel_model_PH
20800, 0, 0.03, 0.5
**E, at, lc, gc
***************************************************************
*Element, type=CPE4
60431, 2031, 2071, 2069, 2043
60432, 35, 2029, 2060, 34
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***************************************************************
*Elset, elset=umatelem, generate
60431, 90645, 1
***************************************************************
*Solid Section, elset=umatelem, material=Material-uel
1.0
*End Part
**
**
** ASSEMBLY
**
*Assembly, name=Assembly
**
*Instance, name=ThreePB-1, part=ThreePB
*End Instance
**
*Node
      1, 0.0250000004,   2.20000005,           0.
*Nset, nset=BTM_L, instance=ThreePB-1
 4,
*Nset, nset=BTM_R, instance=ThreePB-1
 15,
*Nset, nset=RP
 1,
*Nset, nset=TOP, instance=ThreePB-1
    8,    9,   12, 1323, 1324, 1325
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*Elset, elset=TOP, instance=ThreePB-1
  4503,  4504,  4738,  5279,  5447,  5449
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** Constraint: Constraint-1
*Equation
2
TOP, 2, 1.
RP, 2, -1.
**
*Elset, elset=umatelem, instance=ThreePB-1, generate
60431, 90645, 1
**
*End Assembly
***************************************************************
**
** MATERIALS
**
*Material, name=Material-elastic
*Elastic
20800., 0.3
*Material, name=Material-uel
*Depvar
      5,
*User Material, constants=1
0.,
** ----------------------------------------------------------------
**
** STEP: Step-1
**
*Step, name=Step-1, nlgeom=NO, inc=1000
*Static
0.01, 1., 1e-09, 0.01
**
** BOUNDARY CONDITIONS
**
** Name: Load Type: Displacement/Rotation
*Boundary
RP, 1, 1
RP, 2, 2, -0.08
** Name: fix_bottom Type: Displacement/Rotation
*Boundary
BTM_L, 1, 1
BTM_L, 2, 2
** Name: fix_r Type: Displacement/Rotation
*Boundary
BTM_R, 2, 2
**
** OUTPUT REQUESTS
**
*Restart, write, frequency=0
**
** FIELD OUTPUT: F-Output-1
**
*Output, field
*Node Output
RF, U, UR
*Element Output, directions=YES
SDV,
**
** HISTORY OUTPUT: H-Output-1
**
*element output, elset=umatelem
SDV
**
*End Step
